*Heading
** Job name: ForwardFacingStep Model name: Model-1
** Generated by: Abaqus/CAE 6.12-3
*Preprint, echo=NO, model=NO, history=NO, contact=NO
**
** PARTS
**
*Part, name=Plate
*Node
      1,           0.,  0.850000024
      2,           0.,  0.699999988
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*Element, type=CPS3
   1,  368,  366,  262
   2,  622,   59,  525
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*Nset, nset=Set-1, generate
    1,  1136,     1
*Elset, elset=Set-1, generate
    1,  2110,     1
** Section: Section-1
*Solid Section, elset=Set-1, material=Elastic
1.,
*End Part
**
**
** ASSEMBLY
**
*Assembly, name=Assembly
**
*Instance, name=Plate-1, part=Plate
*End Instance
**
*Nset, nset=Set-1, instance=Plate-1
   1,   2,   3,   4,   5,   6
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*Elset, elset=Set-1, instance=Plate-1
  61, 249, 470, 472, 475, 478
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*Elset, elset=_Surf-1_S2, internal, instance=Plate-1
 142, 153, 160, 164, 171, 520, 522, 526, 674, 690, 697, 699, 740, 742, 801
*Elset, elset=_Surf-1_S1, internal, instance=Plate-1
 530,
*Surface, type=ELEMENT, name=Surf-1
_Surf-1_S2, S2
_Surf-1_S1, S1
*End Assembly
**
** MATERIALS
**
*Material, name=Elastic
*Elastic
 3e+07, 0.3
** ----------------------------------------------------------------
**
** STEP: Step-1
**
*Step, name=Step-1
*Static
1., 1., 1e-05, 1.
**
** BOUNDARY CONDITIONS
**
** Name: BC-1 Type: Displacement/Rotation
*Boundary
Set-1, 1, 1
Set-1, 2, 2
**
** LOADS
**
** Name: Load-1   Type: Pressure
*Dsload
Surf-1, P, -5000.
**
** OUTPUT REQUESTS
**
*Restart, write, frequency=0
**
** FIELD OUTPUT: F-Output-1
**
*Output, field, variable=PRESELECT
**
** HISTORY OUTPUT: H-Output-1
**
*Output, history, variable=PRESELECT
*End Step
