*Heading
** Job name: T3Example Model name: Model-1
** Generated by: Abaqus/CAE 6.12-1
*Preprint, echo=NO, model=NO, history=NO, contact=NO
**
** PARTS
**
*Part, name=Plate
*Node
      1,           0.,           0.
      2,           1.,           0.
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*Element, type=CPS3
  1,   1,   2,  23
  2,  23,  22,   1
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*Nset, nset=Set-1, generate
   1,  336,    1
*Elset, elset=Set-1, generate
   1,  600,    1
*Nset, nset=ControlPoint
 336,
*Elset, elset=Stress
 599, 600
** Section: Section-1
*Solid Section, elset=Set-1, material=Steel
1.,
*End Part
**
**
** ASSEMBLY
**
*Assembly, name=Assembly
**
*Instance, name=Plate-1, part=Plate
*End Instance
**
*Nset, nset=EBC, instance=Plate-1, generate
   1,  316,   21
*Elset, elset=EBC, instance=Plate-1, generate
   2,  562,   40
*Elset, elset=_NBC_S2, internal, instance=Plate-1, generate
  39,  599,   40
*Surface, type=ELEMENT, name=NBC
_NBC_S2, S2
*End Assembly
**
** MATERIALS
**
*Material, name=Steel
*Elastic
 3e+07, 0.3
** ----------------------------------------------------------------
**
** STEP: Step-1
**
*Step, name=Step-1
*Static
1., 1., 1e-05, 1.
**
** BOUNDARY CONDITIONS
**
** Name: NBC Type: Displacement/Rotation
*Boundary
NBC, 1, 1
NBC, 2, 2
**
** LOADS
**
** Name: NBC   Type: Pressure
*Dsload
NBC, P, -5000.
**
** OUTPUT REQUESTS
**
*Restart, write, frequency=0
**
** FIELD OUTPUT: F-Output-1
**
*Output, field, variable=PRESELECT
**
** HISTORY OUTPUT: H-Output-2
**
*Output, history
*Node Output, nset=Plate-1.ControlPoint
U1, U2, U3, UR1, UR2, UR3
**
** HISTORY OUTPUT: H-Output-3
**
*Element Output, elset=Plate-1.Stress
INV3, PRESS, S11, S12, S13, S22, S23, S33, SP, TRESC
**
** HISTORY OUTPUT: H-Output-1
**
*Output, history, variable=PRESELECT
*End Step
